// SBML level 3 version 1

model __main()

  // Compartments:
  compartment default_compartment = 1;

  // Species:
  species GLCi in default_compartment = 0.087;
  species P in default_compartment = 6.31;
  species G6P in default_compartment = 2.45;
  species F6P in default_compartment = 0.62;
  species F16P in default_compartment = 5.51;
  species TRIO in default_compartment = 0.96;
  species NAD in default_compartment = 1.2;
  species BPG in default_compartment = 0;
  species NADH in default_compartment = 0.39;
  species P3G in default_compartment = 0.9;
  species P2G in default_compartment = 0.12;
  species PEP in default_compartment = 0.07;
  species PYR in default_compartment = 1.85;
  species ACE in default_compartment = 0.17;

  // Parameters:
  SUM_P = 4.1;

  // Reactions:
  vGLK: GLCi + P -> G6P; GLCi;
  vPGI: G6P -> F6P; GLCi;  // modifiers: GLCi
  vGLYCO: G6P + P => ; GLCi;  // modifiers: GLCi
  vTreha: 2 G6P + P => ; GLCi;  // modifiers: GLCi
  vPFK: F6P + P => F16P; GLCi;  // modifiers: GLCi
  vALD: F16P -> 2 TRIO; GLCi;  // modifiers: GLCi
  vGAPDH: TRIO + NAD -> BPG + NADH; GLCi;  // modifiers: GLCi
  vPGK: BPG -> P3G + P; GLCi;  // modifiers: GLCi
  vPGM: P3G -> P2G; GLCi;  // modifiers: GLCi
  vENO: P2G -> PEP; GLCi;  // modifiers: GLCi
  vPYK: PEP -> PYR + P; GLCi;  // modifiers: GLCi
  vPDC: PYR => ACE; GLCi;  // modifiers: GLCi
  vSUC: 2 ACE + 3 NAD + 4 P => 3 NADH; GLCi;  // modifiers: GLCi
  vGLT: -> GLCi; GLCi;
  vADH: ACE + NADH -> NAD; GLCi;  // modifiers: GLCi
  vG3PDH: TRIO + NADH => NAD; GLCi;  // modifiers: GLCi
  vATP: P -> ; GLCi;  // modifiers: GLCi
end
