// SBML level 3 version 1

model __main()

  // Compartments:
  compartment extracellular = 1;
  compartment cytosol = 1;

  // Species:
  species GLCi in cytosol = 1/cytosol;
  species G6P in cytosol = 1/cytosol;
  species F6P in cytosol = 1/cytosol;
  species F16P in cytosol = 1/cytosol;
  species TRIO in cytosol = 1/cytosol;
  species BPG in cytosol = 1/cytosol;
  species P3G in cytosol = 1/cytosol;
  species P2G in cytosol = 1/cytosol;
  species PEP in cytosol = 1/cytosol;
  species PYR in cytosol = 1/cytosol;
  species ACE in cytosol = 1/cytosol;

  // Reactions:
  vGLK: GLCi -> G6P; 1;
  vPGI: G6P -> F6P; 1;
  vGLYCO: G6P -> ; 1;
  vTreha: 2 G6P -> ; 1;
  vPFK: F6P -> F16P; 1;
  vALD: F16P -> 2 TRIO; 1;
  vGAPDH: TRIO -> BPG; 1;
  vPGK: BPG -> P3G; 1;
  vPGM: P3G -> P2G; 1;
  vENO: P2G -> PEP; 1;
  vPYK: PEP -> PYR; 1;
  vPDC: PYR -> ACE; 1;
  vSUC: 2 ACE -> ; 1;
  vGLT: -> GLCi; 1;
  vADH: ACE -> ; 1;
  vG3PDH: TRIO -> ; 1;
end
