// SBML level 3 version 1

model __main()

  // Compartments:
  compartment extracellular = 1;
  compartment cytosol = 1;

  // Species:
  species GLCi in cytosol = 1/cytosol;
  species G6P in cytosol = 1/cytosol;
  species F6P in cytosol = 1/cytosol;
  species F16P in cytosol = 1/cytosol;
  species TRIO in cytosol = 1/cytosol;
  species BPG in cytosol = 1/cytosol;
  species P3G in cytosol = 1/cytosol;
  species P2G in cytosol = 1/cytosol;
  species PEP in cytosol = 1/cytosol;
  species PYR in cytosol = 1/cytosol;
  species ACE in cytosol = 1/cytosol;
  species NAD in cytosol = 1/cytosol;
  species NADH in cytosol = 1/cytosol;
  species ATP in cytosol = 1/cytosol;
  species ADP in cytosol = 1/cytosol;
  species AMP in cytosol = 1/cytosol;

  // Reactions:
  vGLK: GLCi + ATP -> G6P + ADP; 1;
  vPGI: G6P -> F6P; 1;
  vGLYCO: G6P + ATP -> ADP; 1;
  vTreha: 2 G6P + ATP -> ADP; 1;
  vPFK: F6P + ATP -> F16P + ADP; 1;
  vALD: F16P -> 2 TRIO; 1;
  vGAPDH: TRIO + NAD -> BPG + NADH; 1;
  vPGK: BPG + ADP -> P3G + ATP; 1;
  vPGM: P3G -> P2G; 1;
  vENO: P2G -> PEP; 1;
  vPYK: PEP + ADP -> PYR + ATP; 1;
  vPDC: PYR -> ACE; 1;
  vSUC: 2 ACE + 3 NAD + 4 ATP -> 3 NADH + 4 ADP; 1;
  vGLT: -> GLCi; 1;
  vADH: ACE + NADH -> NAD; 1;
  vG3PDH: TRIO + NADH -> NAD; 1;
  vATP: ATP -> ADP; 1;
  vAK: 2 ADP -> AMP + ATP; 1;
end
