// SBML level 3 version 1

model __main()

  // Compartments:
  compartment extracellular = 1;
  compartment cytosol = 1;

  // Species:
  species GLCi in cytosol = 0.087/cytosol;
  species G6P in cytosol = 2.45/cytosol;
  species F6P in cytosol = 0.62/cytosol;
  species F16P in cytosol = 5.51/cytosol;
  species TRIO in cytosol = 0.96/cytosol;
  species BPG in cytosol = 0;
  species P3G in cytosol = 0.9/cytosol;
  species P2G in cytosol = 0.12/cytosol;
  species PEP in cytosol = 0.07/cytosol;
  species PYR in cytosol = 1.85/cytosol;
  species ACE in cytosol = 0.17/cytosol;
  species $GLCo in extracellular = 50;
  species $ETOH in cytosol = 50;
  species $GLY in cytosol = 0.15;

  // Parameters:
  e_vGLK = 1;
  Vm1 = 5.6;
  Km1 = 0.5;
  Keq1 = 0.01;
  Km2 = 0.5;
  e_vPGI = 1;
  Vm2 = 7.8;
  Km3 = 0.5;
  Keq2 = 4;
  Km4 = 0.5;
  e_vGLYCO = 1;
  k1 = 0.45;
  e_vTreha = 1;
  k2 = 2.3;
  e_vPFK = 1;
  Vm3 = 6.7;
  Km5 = 0.5;
  Keq3 = 4;
  Km6 = 0.5;
  KPyr_Ref = 0.05;
  e_vALD = 1;
  Vm4 = 4.6;
  Km7 = 0.5;
  Km8 = 0.5;
  e_vGAPDH = 1;
  Vm5 = 6.2;
  Km9 = 0.5;
  Km10 = 0.5;
  e_vPGK = 1;
  Vm6 = 5.9;
  Km11 = 0.5;
  Km12 = 0.5;
  e_vPGM = 1;
  Vm7 = 6;
  Km13 = 0.5;
  Km14 = 0.5;
  e_vENO = 1;
  Vm8 = 7.1;
  Km15 = 0.5;
  Km16 = 0.5;
  e_vPYK = 1;
  Vm9 = 4.6;
  Km17 = 0.5;
  Km18 = 0.5;
  e_vPDC = 1;
  Vm10 = 4.7;
  Km19 = 0.5;
  Km20 = 0.5;
  e_vSUC = 1;
  k3 = 1.7;
  e_vGLT = 1;
  Vm11 = 5.2;
  Km21 = 0.5;
  Km22 = 0.5;
  e_vADH = 1;
  Vm12 = 5.3;
  Km23 = 0.5;
  e_vG3PDH = 1;
  k4 = 0.56;
  SUM_P = 4.1;
  F26BP = 0.02;
  KeqAK = 0.45 dimensionless;
  gR = 5.12 dimensionless;
  KmPFKF6P = 0.1 mM;
  KmPFKATP = 0.71 mM;
  Lzero = 0.66 dimensionless;
  CiPFKATP = 100 dimensionless;
  KiPFKATP = 0.65 mM;
  CPFKAMP = 0.0845 dimensionless;
  KPFKAMP = 0.0995 mM;
  CPFKF26BP = 0.0174 dimensionless;
  KPFKF26BP = 0.000682 mM;
  CPFKF16BP = 0.397 dimensionless;
  KPFKF16BP = 0.111 mM;
  CPFKATP = 3 dimensionless;
  KeqTPI = 0.045 dimensionless;
  vGLK_VmGLK = 226.452 mMpermin;
  vGLK_KmGLKGLCi = 0.08 mM;
  vGLK_KmGLKATP = 0.15 mM;
  vGLK_KeqGLK = 3800 dimensionless;
  vGLK_KmGLKG6P = 30 mM;
  vGLK_KmGLKADP = 0.23 mM;
  vPGI_VmPGI_2 = 339.677 mMpermin;
  vPGI_KmPGIG6P_2 = 1.4 mM;
  vPGI_KeqPGI_2 = 0.314 dimensionless;
  vPGI_KmPGIF6P_2 = 0.3 mM;
  vGLYCO_KGLYCOGEN_3 = 6 mMpermin;
  vTreha_KTREHALOSE = 2.4 mMpermin;
  vPFK_VmPFK = 182.903 mMpermin;
  vALD_VmALD = 322.258 mMpermin;
  vALD_KmALDF16P = 0.3 mM;
  vALD_KeqALD = 0.069 dimensionless;
  vALD_KmALDGAP = 2 mM;
  vALD_KmALDDHAP = 2.4 mM;
  vALD_KmALDGAPi = 10 mM;
  vGAPDH_VmGAPDHf = 1184.52 mMpermin;
  vGAPDH_KmGAPDHGAP = 0.21 mM;
  vGAPDH_KmGAPDHNAD = 0.09 mM;
  vGAPDH_VmGAPDHr = 6549.8 mMpermin;
  vGAPDH_KmGAPDHBPG = 0.0098 mM;
  vGAPDH_KmGAPDHNADH = 0.06 mM;
  vPGK_VmPGK = 1306.45 mMpermin;
  vPGK_KmPGKP3G = 0.53 mM;
  vPGK_KmPGKATP = 0.3 mM;
  vPGK_KeqPGK = 3200 dimensionless;
  vPGK_KmPGKBPG = 0.003 mM;
  vPGK_KmPGKADP = 0.2 mM;
  vPGM_VmPGM = 2525.81 mMpermin;
  vPGM_KmPGMP3G = 1.2 mM;
  vPGM_KeqPGM = 0.19 dimensionless;
  vPGM_KmPGMP2G = 0.08 mM;
  vENO_VmENO = 365.806 mMpermin;
  vENO_KmENOP2G = 0.04 mM;
  vENO_KeqENO = 6.7 dimensionless;
  vENO_KmENOPEP = 0.5 mM;
  vPYK_VmPYK = 1088.71 mMpermin;
  vPYK_KmPYKPEP = 0.14 mM;
  vPYK_KmPYKADP = 0.53 mM;
  vPYK_KeqPYK = 6500 dimensionless;
  vPYK_KmPYKPYR = 21 mM;
  vPYK_KmPYKATP = 1.5 mM;
  vPDC_VmPDC = 174.194 mMpermin;
  vPDC_nPDC = 1.9 dimensionless;
  vPDC_KmPDCPYR = 4.33 mM;
  vSUC_KSUCC = 21.4;
  vGLT_VmGLT = 97.264 mmolepermin;
  vGLT_KmGLTGLCo = 1.1918 mM;
  vGLT_KeqGLT = 1 mM;
  vGLT_KmGLTGLCi = 1.1918 mM;
  vADH_VmADH = 810 mMpermin;
  vADH_KiADHNAD = 0.92 mM;
  vADH_KmADHETOH = 17 mM;
  vADH_KeqADH = 6.9e-5 dimensionless;
  vADH_KmADHNAD = 0.17 mM;
  vADH_KmADHNADH = 0.11 mM;
  vADH_KiADHNADH = 0.031 mM;
  vADH_KmADHACE = 1.11 mM;
  vADH_KiADHACE = 1.1 mM;
  vADH_KiADHETOH = 90 mM;
  vG3PDH_VmG3PDH = 70.15 mMpermin;
  vG3PDH_KmG3PDHDHAP = 0.4 mM;
  vG3PDH_KmG3PDHNADH = 0.023 mM;
  vG3PDH_KeqG3PDH = 4300 dimensionless;
  vG3PDH_KmG3PDHGLY = 1 mM;
  vG3PDH_KmG3PDHNAD = 0.93 mM;
  vATP_KATPASE = 33.7 permin;

  // Reactions:
  vGLK: GLCi -> G6P; e_vGLK*(Vm1/Km1*(GLCi - G6P/Keq1)/(1 + GLCi/Km1 + G6P/Km2));
  vPGI: G6P -> F6P; e_vPGI*(Vm2/Km3*(G6P - F6P/Keq2)/(1 + G6P/Km3 + F6P/Km4));
  vGLYCO: G6P => ; e_vGLYCO*k1*G6P;
  vTreha: 2 G6P => ; e_vTreha*k2*G6P;
  vPFK: F6P => F16P; e_vPFK*(Vm3/Km5*(F6P - F16P/Keq3)/(1 + F6P/Km5 + F16P/Km6 + PYR/KPyr_Ref));  // modifiers: PYR
  vALD: F16P -> 2 TRIO; e_vALD*(Vm4/Km7*(F16P - TRIO/Keq3)/(1 + F16P/Km7 + TRIO/Km8));
  vGAPDH: TRIO -> BPG; e_vGAPDH*(Vm5/Km9*(TRIO - BPG/Keq3)/(1 + TRIO/Km9 + BPG/Km10));
  vPGK: BPG -> P3G; e_vPGK*(Vm6/Km11*(BPG - P3G/Keq3)/(1 + BPG/Km11 + P3G/Km12));
  vPGM: P3G -> P2G; e_vPGM*(Vm7/Km13*(P3G - P2G/Keq3)/(1 + P3G/Km13 + P2G/Km14));
  vENO: P2G -> PEP; e_vENO*(Vm8/Km15*(P2G - PEP/Keq3)/(1 + P2G/Km15 + PEP/Km16));
  vPYK: PEP -> PYR; e_vPYK*(Vm9/Km17*(PEP - PYR/Keq3)/(1 + PEP/Km17 + PYR/Km18));
  vPDC: PYR => ACE; e_vPDC*(Vm10/Km19*(PYR - ACE/Keq3)/(1 + PYR/Km19 + ACE/Km20));
  vSUC: 2 ACE => ; e_vSUC*k3*ACE;
  vGLT: $GLCo -> GLCi; e_vGLT*(Vm11/Km21*(GLCo - GLCi/Keq3)/(1 + GLCo/Km21 + GLCi/Km22));
  vADH: ACE -> $ETOH; e_vADH*(Vm12/Km23*ACE/(1 + ACE/Km23));
  vG3PDH: TRIO => $GLY; e_vG3PDH*k4*TRIO;

  // Unit definitions:
  unit mM = 1;
  unit mMpermin = 1;
  unit mmolepermin = 1;
  unit permin = 1;
end
