// SBML level 3 version 2

model __main()

  // Compartments:
  compartment cell = 1;
  compartment extracellular = 1;
  compartment cell_periplasm = 1;

  // Species:
  species ACCOA in cell = 1/cell;
  species ACO in cell = 1/cell;
  species ACP in cell = 1/cell;
  species AKG in cell = 1/cell;
  species BPG in cell = 1/cell;
  species CIT in cell = 1/cell;
  species DAP in cell = 1/cell;
  species E4P in cell = 1/cell;
  species F6P in cell = 1/cell;
  species FDP in cell = 1/cell;
  species FUM in cell = 1/cell;
  species G6P in cell = 1/cell;
  species GAP in cell = 1/cell;
  species GL6P in cell = 1/cell;
  species GLX in cell = 1/cell;
  species ICIT in cell = 1/cell;
  species KDPG in cell = 1/cell;
  species MAL in cell = 1/cell;
  species NAD in cell = 1/cell;
  species NADH in cell = 1/cell;
  species NADP in cell = 1/cell;
  species NADPH in cell = 1/cell;
  species OAA in cell = 1/cell;
  species PEP in cell = 1/cell;
  species PGA2 in cell = 1/cell;
  species PGA3 in cell = 1/cell;
  species PGN in cell = 1/cell;
  species PYR in cell = 1/cell;
  species Q in cell = 1/cell;
  species QH2 in cell = 1/cell;
  species R5P in cell = 1/cell;
  species RU5P in cell = 1/cell;
  species S7P in cell = 1/cell;
  species SUC in cell = 1/cell;
  species SUCCOA in cell = 1/cell;
  species X5P in cell = 1/cell;
  species ei in cell = 1/cell;
  species eiP in cell = 1/cell;
  species eiia in cell = 1/cell;
  species eiiaP in cell = 1/cell;
  species eiicb in cell = 1/cell;
  species eiicbP in cell = 1/cell;
  species hpr in cell = 1/cell;
  species hprP in cell = 1/cell;
  species icd in cell = 1/cell;
  species icdP in cell = 1/cell;
  species tal in cell = 1/cell;
  species talC3 in cell = 1/cell;
  species tkt in cell = 1/cell;
  species tktC2 in cell = 1/cell;
  species ADP in cell = 1/cell;
  species AMP in cell = 1/cell;
  species ATP in cell = 1/cell;
  species CAMP in cell = 1/cell;
  species P in cell = 1/cell;
  species FAD in cell = 1/cell;
  species FADH2 in cell = 1/cell;
  species ACEx in cell = 1/cell;
  species GLCx in extracellular = 1/extracellular;
  species ACEx_0 in extracellular = 1/extracellular;
  species Hout in cell_periplasm = 1/cell_periplasm;
  species GLCp in cell_periplasm = 1/cell_periplasm;
  species Pp in cell_periplasm = 1/cell_periplasm;
  species ACEp in cell_periplasm = 1/cell_periplasm;

  // Reactions:
  vPGI: G6P -> F6P; 1;
  vPFK: ATP + F6P -> ADP + FDP; 1;
  vFBA: FDP -> DAP + GAP; 1;
  vTPI: DAP -> GAP; 1;
  vGDH: GAP + NAD + P -> BPG + NADH; 1;
  vPGK: ADP + BPG -> ATP + PGA3; 1;
  vGPM: PGA3 -> PGA2; 1;
  vENO: PGA2 -> PEP; 1;
  vPYK: ADP + PEP -> ATP + PYR; 1;
  vZWF: G6P + NADP -> GL6P + NADPH; 1;
  vPGL: GL6P -> PGN; 1;
  vGND: NADP + PGN -> NADPH + RU5P; 1;
  vRPE: RU5P -> X5P; 1;
  vRPI: RU5P -> R5P; 1;
  vX5P_GAP_TKT: tkt + X5P -> GAP + tktC2; 1;
  vF6P_E4P_TKT: E4P + tktC2 -> F6P + tkt; 1;
  vS7P_R5P_TKT: R5P + tktC2 -> S7P + tkt; 1;
  vF6P_GAP_TAL: GAP + talC3 -> F6P + tal; 1;
  vS7P_E4P_TAL: S7P + tal -> E4P + talC3; 1;
  vFBP: FDP -> F6P + P; 1;
  vPPC: PEP -> OAA + P; 1;
  vPCK: ATP + OAA -> ADP + PEP; 1;
  vPPS: ATP + PYR -> AMP + PEP + P; 1;
  vMAD: MAL + NAD -> NADH + PYR; 1;
  vPDH: NAD + PYR -> ACCOA + NADH; 1;
  vGLT: ACCOA + OAA -> CIT; 1;
  vACN_1: CIT -> ACO; 1;
  vACN_2: ACO -> ICIT; 1;
  vICD: ICIT + NADP -> AKG + NADPH; 1;
  vLPD: AKG + NAD -> NADH + SUCCOA; 1;
  vSK: ADP + SUCCOA + P -> ATP + SUC; 1;
  vSDH: FAD + SUC -> FUM + FADH2; 1;
  vFUMA: FUM -> MAL; 1;
  vMQO: MAL + Q -> OAA + QH2; 1;
  vMDH: QH2 + OAA -> MAL + Q; 1;
  vACEA: ICIT -> GLX + SUC; 1;
  vACEB: ACCOA + GLX -> MAL; 1;
  vACEK_1: ATP + icd -> ADP + icdP; 1;
  vACEK_2: icdP -> icd + P; 1;
  vEDD: PGN -> KDPG; 1;
  vEDA: KDPG -> GAP + PYR; 1;
  vNADH_req: NADH + Q -> NAD + QH2 + 4 Hout; 1;
  vPNT_req: NAD + NADPH -> NADH + NADP; 1;
  vADK: AMP + ATP -> 2 ADP; 1;
  vATP_syn: ADP + P + 4 Hout -> ATP; 1;
  vCYA: ATP -> CAMP + 2 P; 1;
  vDOS: CAMP -> AMP; 1;
  vACK: ACP + ADP -> ACEx + ATP; 1;
  vACS: ACEx + ATP -> ACCOA + AMP + 2 P; 1;
  vPTA: ACCOA + P -> ACP; 1;
  vPTS_0: ei + PEP -> eiP + PYR; 1;
  vPTS_1: hpr + eiP -> hprP + ei; 1;
  vPTS_2: eiia + hprP -> eiiaP + hpr; 1;
  vPTS_3: eiicb + eiiaP -> eiicbP + eiia; 1;
  vPTS_4: GLCp + eiicbP -> G6P + eiicb; 1;
  vGLC_feed: -> GLCx; 1;
  vCYTBO: 2 QH2 -> 2 Q + 8 Hout; 1;
  vSQR: FADH2 + Q -> FAD + QH2; 1;
  vNDHII: NADH + Q -> NAD + QH2; 1;
  vGROWTH: 116 G6P + 204 E4P + 845 PGA3 + 1010 OAA + 610 AKG + 1601 PYR + 507 R5P + 293 PEP + 73 GAP + 40 F6P + 10169 NADPH + 2118 ACCOA + 2004 NAD + 30508 ATP -> 10169 NADP + 2004 NADH + 30508 ADP + 30508 P; 1;
  vATP_MAINTENANCE: ATP -> ADP + P; 1;
  vXCH_GLC: GLCx -> GLCp; 1;
  vPIT: Pp + Hout -> P; 1;
  vXCH_P: -> Pp; 1;
  vXCH_ACE1: ACEx -> ACEp; 1;
  v_ACE_OUT: ACEx_0 -> ; 1;
  vXCH_ACE2: ACEp -> ACEx_0; 1;
  vGL6P_HYDROLYSIS: GL6P -> PGN; 1;
end
