// SBML level 3 version 2

model __main()

  // Compartments:
  compartment extracellular = 1;
  compartment cytosol = 1;

  // Species:
  species Ai__ in cytosol = 1/cytosol;
  species B__ in cytosol = 1/cytosol;
  species C__ in cytosol = 1/cytosol;
  species D__ in cytosol = 1/cytosol;
  species E__ in cytosol = 1/cytosol;
  species F__ in cytosol = 1/cytosol;
  species G__ in cytosol = 1/cytosol;
  species H__ in cytosol = 1/cytosol;
  species I__ in cytosol = 1/cytosol;
  species J__ in cytosol = 1/cytosol;
  species K__ in cytosol = 1/cytosol;

  // Reactions:
  vKIL: Ai__ -> B__; 1;
  vLIM: B__ -> C__; 1;
  vMIK: B__ -> ; 1;
  vNOV: 2 B__ -> ; 1;
  vOSC: C__ -> D__; 1;
  vPAP: D__ -> 2 E__; 1;
  vQUE: E__ -> F__; 1;
  vROM: F__ -> G__; 1;
  vSIE: G__ -> H__; 1;
  vTAN: H__ -> I__; 1;
  vUNI: I__ -> J__; 1;
  vVIC: J__ -> K__; 1;
  vWHI: 2 K__ -> ; 1;
  vXRA: -> Ai__; 1;
  vYAN: K__ -> ; 1;
  vZUL: E__ -> ; 1;
end
